<neuroml xmlns="http://www.neuroml.org/schema/neuroml2"  xmlns:xs="http://www.w3.org/2001/XMLSchema" xmlns:xsi="http://www.w3.org/2001/XMLSchema-instance" xsi:schemaLocation="http://www.neuroml.org/schema/neuroml2 https://raw.github.com/NeuroML/NeuroML2/development/Schemas/NeuroML2/NeuroML_v2beta5.xsd" id="Example3_Network">
    <notes>Generated network</notes>
    <expTwoSynapse id="ampa" gbase="0.5nS" erev="0mV" tauDecay="2ms" tauRise="1ms"/>
    <iafCell id="iaf" leakReversal="-50mV" thresh="-55mV" reset="-70mV" C="0.2nF" leakConductance="0.01uS"/>
    <network id="Example3_Network">
        <notes>The network</notes>
        <population id="pop0" component="iaf" size="5" type="populationList">
            <instance id="0">
                <location x="966.453535692138757" y="44.073259917535268" z="7.491470058587191"/>
            </instance>
            <instance id="1">
                <location x="910.975962449124154" y="93.926899736376399" z="582.227573058949133"/>
            </instance>
            <instance id="2">
                <location x="671.563481487985086" y="8.393822683708397" z="766.480932791796249"/>
            </instance>
            <instance id="3">
                <location x="236.809775363117751" y="3.081402172660996" z="788.772717236283484"/>
            </instance>
            <instance id="4">
                <location x="346.088965597123092" y="62.328147503916853" z="615.815695103615212"/>
            </instance>
        </population>
        <population id="pop1" component="iaf" size="10" type="populationList">
            <instance id="0">
                <location x="148.55463870828757" y="183.090647409931648" z="114.412969688687639"/>
            </instance>
            <instance id="1">
                <location x="14.618780486909122" y="486.751540604758361" z="964.901560916215658"/>
            </instance>
            <instance id="2">
                <location x="64.562280977186077" y="541.088185551130209" z="465.898559008309576"/>
            </instance>
            <instance id="3">
                <location x="601.463449561051448" y="88.928829990662322" z="579.002686187366521"/>
            </instance>
            <instance id="4">
                <location x="269.585503819448263" y="556.432560556215549" z="644.634234178282668"/>
            </instance>
            <instance id="5">
                <location x="481.036371366518438" y="355.239147442983324" z="249.152121361208998"/>
            </instance>
            <instance id="6">
                <location x="933.515498042346735" y="453.388019476493525" z="530.161206911590284"/>
            </instance>
            <instance id="7">
                <location x="19.299566309716852" y="508.101925779792168" z="5.780237417743139"/>
            </instance>
            <instance id="8">
                <location x="143.768427595595369" y="472.826925347406359" z="377.347440772596428"/>
            </instance>
            <instance id="9">
                <location x="54.175198646142839" y="587.52850813106943" z="164.003223741961193"/>
            </instance>
        </population>
        <projection id="proj0" presynapticPopulation="pop0" postsynapticPopulation="pop1" synapse="ampa">
            <connection id="0" preCellId="../pop0/0/iaf" postCellId="../pop1/1/iaf"/>
            <connection id="1" preCellId="../pop0/0/iaf" postCellId="../pop1/5/iaf"/>
            <connection id="2" preCellId="../pop0/0/iaf" postCellId="../pop1/6/iaf"/>
            <connection id="3" preCellId="../pop0/0/iaf" postCellId="../pop1/7/iaf"/>
            <connection id="4" preCellId="../pop0/0/iaf" postCellId="../pop1/8/iaf"/>
            <connection id="5" preCellId="../pop0/1/iaf" postCellId="../pop1/0/iaf"/>
            <connection id="6" preCellId="../pop0/1/iaf" postCellId="../pop1/1/iaf"/>
            <connection id="7" preCellId="../pop0/1/iaf" postCellId="../pop1/3/iaf"/>
            <connection id="8" preCellId="../pop0/1/iaf" postCellId="../pop1/5/iaf"/>
            <connection id="9" preCellId="../pop0/1/iaf" postCellId="../pop1/6/iaf"/>
            <connection id="10" preCellId="../pop0/1/iaf" postCellId="../pop1/7/iaf"/>
            <connection id="11" preCellId="../pop0/1/iaf" postCellId="../pop1/8/iaf"/>
            <connection id="12" preCellId="../pop0/2/iaf" postCellId="../pop1/0/iaf"/>
            <connection id="13" preCellId="../pop0/2/iaf" postCellId="../pop1/2/iaf"/>
            <connection id="14" preCellId="../pop0/2/iaf" postCellId="../pop1/5/iaf"/>
            <connection id="15" preCellId="../pop0/2/iaf" postCellId="../pop1/8/iaf"/>
            <connection id="16" preCellId="../pop0/2/iaf" postCellId="../pop1/9/iaf"/>
            <connection id="17" preCellId="../pop0/3/iaf" postCellId="../pop1/0/iaf"/>
            <connection id="18" preCellId="../pop0/3/iaf" postCellId="../pop1/1/iaf"/>
            <connection id="19" preCellId="../pop0/3/iaf" postCellId="../pop1/2/iaf"/>
            <connection id="20" preCellId="../pop0/3/iaf" postCellId="../pop1/5/iaf"/>
            <connection id="21" preCellId="../pop0/3/iaf" postCellId="../pop1/9/iaf"/>
            <connection id="22" preCellId="../pop0/4/iaf" postCellId="../pop1/2/iaf"/>
            <connection id="23" preCellId="../pop0/4/iaf" postCellId="../pop1/4/iaf"/>
            <connection id="24" preCellId="../pop0/4/iaf" postCellId="../pop1/5/iaf"/>
            <connection id="25" preCellId="../pop0/4/iaf" postCellId="../pop1/9/iaf"/>
        </projection>
    </network>
</neuroml>
