<Lems>

    <!--

        This LEMS file has been automatically generated using PyNeuroML v0.3.4 (libNeuroML v0.2.34)

     -->

    <!-- Specify which component to run -->
    <Target component="SimExample3"/>

    <!-- Include core NeuroML2 ComponentType definitions -->
    <Include file="Cells.xml"/>
    <Include file="Networks.xml"/>
    <Include file="Simulation.xml"/>

    <Include file="Example3_Network.net.nml"/>

    <Simulation id="SimExample3" length="1000.0ms" step="0.025ms" target="Example3_Network" seed="12345">  <!-- Note seed: ensures same random numbers used every run -->

        <Display id="DispPop__pop0" title="Membrane potentials of cells in pop0" timeScale="1ms" xmin="-100.0" xmax="1100.0" ymin="-90" ymax="50">
            <Line id="pop0[0]: v" quantity="pop0/0/iaf/v" scale="1mV" color="#6aa799" timeScale="1ms"/>
            <Line id="pop0[1]: v" quantity="pop0/1/iaf/v" scale="1mV" color="#029a72" timeScale="1ms"/>
            <Line id="pop0[2]: v" quantity="pop0/2/iaf/v" scale="1mV" color="#d340bb" timeScale="1ms"/>
            <Line id="pop0[3]: v" quantity="pop0/3/iaf/v" scale="1mV" color="#4c73a9" timeScale="1ms"/>
            <Line id="pop0[4]: v" quantity="pop0/4/iaf/v" scale="1mV" color="#5e503a" timeScale="1ms"/>
        </Display>

        <Display id="DispPop__pop1" title="Membrane potentials of cells in pop1" timeScale="1ms" xmin="-100.0" xmax="1100.0" ymin="-90" ymax="50">
            <Line id="pop1[0]: v" quantity="pop1/0/iaf/v" scale="1mV" color="#3193ca" timeScale="1ms"/>
            <Line id="pop1[1]: v" quantity="pop1/1/iaf/v" scale="1mV" color="#90e5e9" timeScale="1ms"/>
            <Line id="pop1[2]: v" quantity="pop1/2/iaf/v" scale="1mV" color="#29645f" timeScale="1ms"/>
            <Line id="pop1[3]: v" quantity="pop1/3/iaf/v" scale="1mV" color="#1fcff4" timeScale="1ms"/>
            <Line id="pop1[4]: v" quantity="pop1/4/iaf/v" scale="1mV" color="#6ed4e9" timeScale="1ms"/>
            <Line id="pop1[5]: v" quantity="pop1/5/iaf/v" scale="1mV" color="#8fe460" timeScale="1ms"/>
            <Line id="pop1[6]: v" quantity="pop1/6/iaf/v" scale="1mV" color="#2ca1c7" timeScale="1ms"/>
            <Line id="pop1[7]: v" quantity="pop1/7/iaf/v" scale="1mV" color="#8d9fe5" timeScale="1ms"/>
            <Line id="pop1[8]: v" quantity="pop1/8/iaf/v" scale="1mV" color="#5adad1" timeScale="1ms"/>
            <Line id="pop1[9]: v" quantity="pop1/9/iaf/v" scale="1mV" color="#f543bb" timeScale="1ms"/>
        </Display>

        <OutputFile id="Volts_file__pop0" fileName="SimExample3.pop0.v.dat">
            <OutputColumn id="v_pop0_0_iaf_v" quantity="pop0/0/iaf/v"/>
            <OutputColumn id="v_pop0_1_iaf_v" quantity="pop0/1/iaf/v"/>
            <OutputColumn id="v_pop0_2_iaf_v" quantity="pop0/2/iaf/v"/>
            <OutputColumn id="v_pop0_3_iaf_v" quantity="pop0/3/iaf/v"/>
            <OutputColumn id="v_pop0_4_iaf_v" quantity="pop0/4/iaf/v"/>
        </OutputFile>

        <OutputFile id="Volts_file__pop1" fileName="SimExample3.pop1.v.dat">
            <OutputColumn id="v_pop1_0_iaf_v" quantity="pop1/0/iaf/v"/>
            <OutputColumn id="v_pop1_1_iaf_v" quantity="pop1/1/iaf/v"/>
            <OutputColumn id="v_pop1_2_iaf_v" quantity="pop1/2/iaf/v"/>
            <OutputColumn id="v_pop1_3_iaf_v" quantity="pop1/3/iaf/v"/>
            <OutputColumn id="v_pop1_4_iaf_v" quantity="pop1/4/iaf/v"/>
            <OutputColumn id="v_pop1_5_iaf_v" quantity="pop1/5/iaf/v"/>
            <OutputColumn id="v_pop1_6_iaf_v" quantity="pop1/6/iaf/v"/>
            <OutputColumn id="v_pop1_7_iaf_v" quantity="pop1/7/iaf/v"/>
            <OutputColumn id="v_pop1_8_iaf_v" quantity="pop1/8/iaf/v"/>
            <OutputColumn id="v_pop1_9_iaf_v" quantity="pop1/9/iaf/v"/>
        </OutputFile>

    </Simulation>

</Lems>
